Simulations
  DataStore
    ExcelInput Observed: FileName=Observations\obsDataMaize_DB.xlsx; SheetNames=[HarvestData]
    PredictedObserved: PredictedTableName=HarvestReport; ObservedTableName=HarvestData; FieldNameUsedForMatch=Stage
      Tests: POName=PredictedObserved
        AcceptedStats:
          Name          n    Slope     Intercept  SEslope    SEintercept  R2        RMSE       NSE        ME        MAE        RSR
          Biomass       88   1.13027   -25.1976   0.0437089  59.9075      0.886046  284.528    0.764887   136.16    215.3      0.482122
          FinalLeafNo   21   0.744909  6.09095    0.124044   2.33496      0.654936  1.41253    -1.24544   1.29524   1.29524    1.46237
          FloweringDAS  90   0.660831  24.1496    0.0857754  4.84594      0.402802  7.75958    -0.351338  5.12222   6.34444    1.15599
          GPSM          84   0.913142  243.722    0.0423235  101.461      0.850226  479.551    0.842776   63.9399   352.636    0.394148
          GrainSize     78   0.551064  0.148649   0.129552   0.037189     0.192291  0.0709914  -0.637329  0.022208  0.0528936  1.27135
          GrainWt       103  0.914355  95.7562    0.0413149  28.7691      0.829045  152.076    0.803946   43.8771   120.756    0.440626
          LAImax        74   1.17728   0.301161   0.0525986  0.158356     0.874338  1.01171    0.434272   0.778652  0.786024   0.74705
          MaturityDAS   90   0.903042  16.3785    0.0521029  5.92932      0.773426  9.70166    0.636879   5.45556   8.12222    0.599238
        AcceptedStatsName=Name n Slope Intercept SEslope SEintercept R2 RMSE NSE ME MAE RSR
    ExcelInput ObservedTimeSeries: FileName=Observations\obsDataMaize_DB.xlsx; SheetNames=[TimeSeriesData]
    ExcelInput NZObserved: FileName=Observations\obsDataMaize_DB.xlsx; SheetNames=[observed]
    ExcelInput RainShelterN: FileName=Observations\obsDataMaize_DB.xlsx; SheetNames=[RainShelterNitrogen]
    ExcelInput RainShelterSW: FileName=Observations\SoilWater.xlsx; SheetNames=[SoilWater]
    ExcelInput RainShelterCob: FileName=Observations\obsDataMaize_DB.xlsx; SheetNames=[RachisHusk_RainS]
    TimeSeriesStats: TableName=PredictedObserved
    ExcelInput PhenologySimple: FileName=Observations\obsDataMaize_DB.xlsx; SheetNames=[PhenologySimple]
    ExcelInput RainShelterSen: FileName=Observations\LeafSenesCount.xlsx; SheetNames=[EndSenes]
    ExcelInput RainShelterSenStart: FileName=Observations\LeafSenesCount.xlsx; SheetNames=[StartSenes]
    ExcelInput RainShelterLeafSize: FileName=Observations\IndLeafData_MaizeRainshelter.xlsx; SheetNames=[MaxLeafSize]
    Probability: TableName=SensibilityReport; Exceedence=false
  Folder Validation
    Memo Introduction
      The APSIM Maize model has been tested on a range of datasets from around the world to provide tests across a range of environmental conditions.  Tests include ranges in plant population, nitrogen management and irrigation levels, as well as including historical datasets from africa using cultivars developed during the 1960's, through to modern varieties grown in the American mid-West.
    Folder Maize
      Memo
        Testing of APSIM Maize under New Zealand conditions to determine the perormance of the model under temperate conditions with cool springs and mild summers.  A range of trials have been conducted and are detailed below
      Experiment Lincoln2012
        Memo
          ### Lincoln2012 (Rain-Shelter Trail)

          Testing of APSIM Maize under New Zealand conditions was undertaken using the data of [Teixeira_etal_2014].  This dataset includes the impact of three N (0 to 250 kg/ha N) and two water regimes (dryland and fully irrigated) using a rain-shelter structure.  Observations include biomass growth and nitrogen content of individual organs, soil water contents, leaf area index, phenology and yield components. Total biomass ranged from 8000 kg/ha for dryland nil N crops to up to 28000kg/ha for fully irrigated and N fertilised crops.  Dryland crops recovered 25 percent less N from applied fertilizer than irrigated crops.
        Factors
          Factor Nit: Specifications=[Fert]
            Operations Nil
              2012-11-15  [Fertiliser].Apply(0, Fertiliser.Types.UreaN, 10);
              2012-12-20  [Fertiliser].Apply(0, Fertiliser.Types.UreaN, 10);
              2013-01-31  [Fertiliser].Apply(0, Fertiliser.Types.UreaN, 10);
            Operations Low
              2012-11-15  [Fertiliser].Apply(25, Fertiliser.Types.UreaN, 10);
              2012-12-20  [Fertiliser].Apply(50, Fertiliser.Types.UreaN, 10);
            Operations Med
              2012-11-15  [Fertiliser].Apply(50, Fertiliser.Types.UreaN, 10);
              2012-12-20  [Fertiliser].Apply(100, Fertiliser.Types.UreaN, 10);
              2013-01-31  [Fertiliser].Apply(100, Fertiliser.Types.UreaN, 10);
          Factor Irr: Specifications=[Irrig]
            Operations Full
              2012-10-24  [Irrigation].Apply(16);
              2012-10-26  [Irrigation].Apply(10);
              2012-11-03  [Irrigation].Apply(13);
              2012-11-11  [Irrigation].Apply(19.5);
              2012-11-15  [Irrigation].Apply(3.1);
              2012-11-23  [Irrigation].Apply(25);
              2012-11-29  [Irrigation].Apply(25);
              2012-11-30  [Irrigation].Apply(30);
              2012-12-13  [Irrigation].Apply(19);
              2012-12-20  [Irrigation].Apply(26);
              2012-12-20  [Irrigation].Apply(4);
              2012-12-27  [Irrigation].Apply(22);
              2013-01-03  [Irrigation].Apply(39.7);
              2013-01-10  [Irrigation].Apply(42.1);
              2013-01-17  [Irrigation].Apply(46.2);
              2013-01-24  [Irrigation].Apply(44.7);
              2013-01-31  [Irrigation].Apply(49.0);
              2013-02-07  [Irrigation].Apply(37);
              2013-02-14  [Irrigation].Apply(38);
              2013-02-21  [Irrigation].Apply(38);
              2013-02-28  [Irrigation].Apply(33.4);
              2013-03-07  [Irrigation].Apply(39.7);
              2013-03-14  [Irrigation].Apply(31.3);
              2013-03-21  [Irrigation].Apply(24);
              2013-03-28  [Irrigation].Apply(34);
              2013-04-04  [Irrigation].Apply(27.5);
            Operations Nil
              2012-10-24  [Irrigation].Apply(16);
              2012-10-26  [Irrigation].Apply(10);
              2012-11-03  [Irrigation].Apply(13);
              2012-11-11  [Irrigation].Apply(19.5);
              2012-11-15  [Irrigation].Apply(3.1);
              2012-11-23  [Irrigation].Apply(25);
              2012-11-29  [Irrigation].Apply(25);
              2012-12-20  [Irrigation].Apply(4);
              2013-01-31  [Irrigation].Apply(4.3);
        Simulation Lincoln2012: Area=0; Slope=0
          Weather: FileName=lincoln.met
          Clock: StartDate=2012-10-01; EndDate=2013-04-25
          Summary summaryfile
          SoilArbitrator Soil Arbitrator
          Zone RainShelter: Area=1; Slope=0
            Soil paparoa_silt_loam: SoilType=lignin_FOM; Region=Generic soil types; State=Canterbury; Latitude=999999; Longitude=999999
              DataSource=Profile descriptions provided by Trevor Webb and data for functional horizions based on SWAMP project results
              Water
                Thickness  BD     AirDry  LL15  DUL   SAT
                200        1.311  0.06    0.06  0.3   0.37
                200        1.474  0.12    0.12  0.3   0.37
                200        1.601  0.1     0.12  0.26  0.32
                200        1.68   0.13    0.13  0.24  0.3
                200        1.68   0.12    0.12  0.24  0.3
                200        1.68   0.15    0.15  0.21  0.3
                200        1.68   0.15    0.15  0.21  0.3
                200        1.68   0.15    0.15  0.21  0.3
                SoilCrop MaizeSoil: LL=[0.084, 0.12, 0.12, 0.15, 0.15, 0.06, 0.06, 0.06]; KL=[0.1, 0.075, 0.06, 0.06, 0.02, 0.005, 0.002, 0.001]; XF=[1, 0.7, 0.3, 0.3, 0.7, 1, 1, 1]
              SoilWater: SummerDate=1-Nov; SummerU=9; SummerCona=4.4; WinterDate=1-Apr; WinterU=6; WinterCona=3; DiffusConst=88; DiffusSlope=35; Salb=0.13; CN2Bare=73; CNRed=20; CNCov=0.8; max_pond=0; Thickness=[200, 200, 200, 200, 200, 200, 200, 200]; SWCON=[0.5, 0.56, 0.31, 0.7, 0.7, 0.7, 0.7, 0.7]; residueinterception=0
              SoilNitrogen: fom_type=[default, manure, mucuna, lablab, shemp, stable]; fract_carb=[0.2, 0.3, 0.54, 0.57, 0.45, 0]; fract_cell=[0.7, 0.3, 0.37, 0.37, 0.47, 0.1]; fract_lign=[0.1, 0.4, 0.09, 0.06, 0.08, 0.9]; wfpsN2N2O_x=[22, 88]; wfpsN2N2O_y=[0.1, 1]
              SoilOrganicMatter: RootCN=16; RootWt=6000; SoilCN=11; EnrACoeff=7.4; EnrBCoeff=0.2; OCUnits=Total
                Thickness  OC    FBiom  FInert
                200        3.6   0.03   0.3
                200        0.97  0.02   0.6
                200        0.42  0.01   0.8
                300        0.23  0.01   0.9
                300        0.23  0.01   0.9
                300        0.23  0.01   0.9
              Analysis: Thickness=[200, 200, 200, 300, 300, 300]; PH=[6, 6, 6, 6, 6, 6]; PHUnits=Water; BoronUnits=HotWater
              Sample Initial nitrogen: NO3Units=kgha; NH4Units=kgha; SWUnits=Volumetric; OCUnits=Total; PHUnits=Water
                Thickness  NO3    NH4   SW
                200        16.23  0.9   0.06
                200        10.76  2.92  0.25
                200        7.83   0.57  0.2
                300        6.85   0.98  0.2
                300        4.88   0.84  0.2
                300        1.74   0.54  0.2
            MicroClimate: a_interception=0; b_interception=1; c_interception=0; d_interception=0; soil_albedo=0.23; air_pressure=1010; soil_emissivity=0.96; sun_angle=15; soil_heat_flux_fraction=0.4; night_interception_fraction=0.5; windspeed_default=3; refheight=2; albedo=0.15; emissivity=0.96; gsmax=0.01; r50=200
            Irrigation
            Fertiliser
            SurfaceOrganicMatter: PoolName=wheat; type=wheat; mass=0; standing_fraction=0; cnr=80; CriticalResidueWeight=2000; OptimumDecompTemp=20; MaxCumulativeEOS=20; CNRatioDecompCoeff=0.277; CNRatioDecompThreshold=25; TotalLeachRain=25; MinRainToLeach=10; CriticalMinimumOrganicC=0.004; DefaultCPRatio=0; DefaultStandingFraction=0; StandingExtinctCoeff=0.5; FractionFaecesAdded=0.5
              Pools:
                {PoolName=wheat, ResidueType=wheat, Mass=0, CNRatio=80, StandingFraction=0}
              ResidueTypes ResidueTypesList: LoadFromResource=ResidueTypes
            Manager ClimateControl
              StartDate = 2012-10-23
              EndDate = 2013-04-10
```csharp
using System;
using Models.Core;
using APSIM.Shared.Utilities;



using System.Collections.Generic;
using System.Text;
using Models.PMF;
using Models;
using System.Xml.Serialization;

namespace Models
{
	[Serializable] 
	[System.Xml.Serialization.XmlInclude(typeof(Model))]
	public class Script : Model
	{
		[Link] Weather Met;
		[Link] Clock Clock;
    
		[Description("Start Date")]
		public DateTime StartDate { get; set; }
        
		[Description("End Date")]
		public DateTime EndDate { get; set; }
 
    
		[EventSubscribe("PreparingNewWeatherData")]
		private void OnPreparingNewWeatherData(object sender, EventArgs e)
		{
			if ((Clock.Today.Date >= StartDate) && (Clock.Today.Date <= EndDate))
				Met.Rain = 0;		
		}
	}
}
```
            Operations Irrig
              2012-10-24  [Irrigation].Apply(16);
              2012-10-26  [Irrigation].Apply(10);
              2012-11-03  [Irrigation].Apply(13);
              2012-11-11  [Irrigation].Apply(19.5);
              2012-11-15  [Irrigation].Apply(3.1);
              2012-11-23  [Irrigation].Apply(20);
              2012-11-29  [Irrigation].Apply(20);
              2012-11-30  [Irrigation].Apply(30);
              2012-12-13  [Irrigation].Apply(19);
              2012-12-20  [Irrigation].Apply(26);
              2012-12-20  [Irrigation].Apply(4);
              2012-12-27  [Irrigation].Apply(22);
              2013-01-03  [Irrigation].Apply(39.7);
              2013-01-10  [Irrigation].Apply(42.1);
              2013-01-17  [Irrigation].Apply(46.2);
              2013-01-24  [Irrigation].Apply(44.7);
              2013-01-31  [Irrigation].Apply(44.7);
              2013-01-31  [Irrigation].Apply(4.3);
              2013-02-07  [Irrigation].Apply(37);
              2013-02-14  [Irrigation].Apply(38);
              2013-02-21  [Irrigation].Apply(38);
              2013-02-28  [Irrigation].Apply(33.4);
              2013-03-07  [Irrigation].Apply(39.7);
              2013-03-14  [Irrigation].Apply(31.3);
              2013-03-21  [Irrigation].Apply(24);
              2013-03-28  [Irrigation].Apply(34);
              2013-04-04  [Irrigation].Apply(27.5);
            Operations Fert
              2012-11-15  [Fertiliser].Apply(50, Fertiliser.Types.UreaN, 10);
              2012-12-20  [Fertiliser].Apply(100, Fertiliser.Types.UreaN, 10);
              2013-01-31  [Fertiliser].Apply(100, Fertiliser.Types.UreaN, 10);
            Operations Sow
              2012-10-23  [Maize].Sow(population:11, cultivar:"Pioneer_39G12", depth:50, rowSpacing:710);
            Plant Maize: CropType=Maize
            Manager ExtraVariables
```csharp
using System;
using Models.Core;
using System.Collections.Generic;
using System.Text;
using Models.Soils;
using Models.PMF;
using Models;
using System.Xml.Serialization;
using APSIM.Shared.Utilities;

namespace Models
{
	[Serializable] 
	public class Script : Model
	{
		[Link] Clock Clock;
		[Link] Soils.Soil Soil;
		[Link] Models.SurfaceOM.SurfaceOrganicMatter SOM;
		[Link] Weather Met;
		[Link] Fertiliser Fert;
		[Link] Irrigation Irrig;
		[Link] Plant Maize;
		[Link] Zone zone;
					
		[XmlIgnore] public bool InitialDay { get; set; }
		
		[XmlIgnore] public double AccumPlantN { get; set; }
		[XmlIgnore] public double AccumMineralisation { get; set; }
		[XmlIgnore] public double AccumDenit { get; set; }
		[XmlIgnore] public double AccumFert { get; set; }
		[XmlIgnore] public double AccumLeach { get; set; }
		[XmlIgnore] public double AccumDetach { get; set; }
		[XmlIgnore] public double DeltaSoilOMN { get; set; }
		[XmlIgnore] public double DeltaSurfaceOMN { get; set; }
		[XmlIgnore] public double DeltaSoilMineralN { get; set; }
		[XmlIgnore] public double SoilNitrogenContent { get; set; }
		
		[XmlIgnore] public double AccumEO { get; set; }
		[XmlIgnore] public double AccumEP { get; set; }
		[XmlIgnore] public double AccumES { get; set; }
		[XmlIgnore] public double AccumDrainage { get; set; }
		[XmlIgnore] public double AccumRunoff { get; set; }
		[XmlIgnore] public double AccumOutflowLat { get; set; }
		[XmlIgnore] public double AccumIrrigation { get; set; }
		[XmlIgnore] public double AccumRainfall { get; set; }
		[XmlIgnore] public double SoilWaterDeficit { get; set; }
	
		[XmlIgnore] public double  InitialSoilOMN { get; set; }
		[XmlIgnore] public double  InitialSurfaceOMN { get; set; }
		[XmlIgnore] public double  InitialMineralN { get; set; }
		
		[XmlIgnore] public double SWC { get; set; }
		[XmlIgnore] public double DUL { get; set; }
		[XmlIgnore] public double OutFlowLat { get; set; }

		[XmlIgnore] public double FomN { get; set; }
		[XmlIgnore] public double BiomN { get; set; }
		[XmlIgnore] public double HumN { get; set; }
		[XmlIgnore] public double OrganicN { get; set; }
		[XmlIgnore] public double NO3N { get; set; }
		[XmlIgnore] public double NH4N { get; set; }
		[XmlIgnore] public double UreaN { get; set; }
		[XmlIgnore] public double MineralN { get; set; }
		[XmlIgnore] public double DltNMinRes { get; set; }
		[XmlIgnore] public double DltNMinTot { get; set; }
		
		[XmlIgnore] public double LeafExpandedPosition { get; set; }
		[XmlIgnore] public double LeafAppearedPosition { get; set; }
		[XmlIgnore] public double ExpandedLeafNoYesterday { get; set; }
		[XmlIgnore] public double AppearedLeafNoYesterday { get; set; }
		[XmlIgnore] public double MostRecentlyExpandedLeafSize { get; set; }
		[XmlIgnore] public double MostRecentlyAppearedLeafMaxSize { get; set; }
        
		[EventSubscribe("Commencing")]
		private void OnSimulationCommencing(object sender, EventArgs e)
		{
			InitialDay = true;
			LeafExpandedPosition = 0;
			LeafAppearedPosition = 0;
			ExpandedLeafNoYesterday = 0;
			AppearedLeafNoYesterday = 0;
			MostRecentlyExpandedLeafSize = 0;
			MostRecentlyAppearedLeafMaxSize = 0;
		}
		
		[EventSubscribe("DoManagement")]
		private void OnDoManagement(object sender, EventArgs e)
		{
			//!!!!!! Nitrogen balance components !!!!!!
			//!!!!!!^^^^^^^^^^^^^^^^^^^^^^^^^^^^^!!!!!!
			FomN = MathUtilities.Sum(Soil.SoilNitrogen.FOMN);
			HumN = MathUtilities.Sum(Soil.SoilNitrogen.HumicN);
			BiomN = MathUtilities.Sum(Soil.SoilNitrogen.MicrobialN);
			OrganicN = FomN + HumN + BiomN;
			NO3N = MathUtilities.Sum(Soil.NO3N);
			NH4N = MathUtilities.Sum(Soil.NH4N);
			UreaN = MathUtilities.Sum(Soil.SoilNitrogen.urea);
			MineralN = NO3N + NH4N + UreaN; 
			DltNMinRes = MathUtilities.Sum(Soil.SoilNitrogen.dlt_n_min_res);
			DltNMinTot = MathUtilities.Sum(Soil.SoilNitrogen.MineralisedN);
			int layers = Soil.Thickness.Length;
			if (InitialDay == true)
			{
				InitialSurfaceOMN = SOM.N;
				InitialSoilOMN = OrganicN;
				InitialMineralN = MineralN;
				InitialDay = false;
			}
			AccumFert += Fert.NitrogenApplied;
			DeltaSurfaceOMN = SOM.N - InitialSurfaceOMN;
			AccumLeach = AccumLeach - Soil.SoilWater.LeachNH4 - Soil.SoilWater.LeachNO3 - Soil.SoilWater.LeachUrea; //Fails
			AccumMineralisation += MathUtilities.Sum(Soil.SoilNitrogen.MineralisedN);
			AccumDenit -= MathUtilities.Sum(Soil.SoilNitrogen.Denitrification);
			AccumPlantN -= (double)zone.Get("Maize.Root.NUptake");
			DeltaSoilOMN = OrganicN - InitialSoilOMN;
			DeltaSoilMineralN = MineralN - InitialMineralN;
			SoilNitrogenContent = MineralN;
			
			//!!!!!! Water balance components !!!!!!
			//!!!!!!^^^^^^^^^^^^^^^^^^^^^^^^^^!!!!!!

			AccumIrrigation += Irrig.IrrigationApplied;
			AccumRainfall += Met.Rain;
			//AccumEP -= (double)zone.Get("[Maize].Leaf.Transpiration");
			AccumEP -= (double)zone.Get("Maize.Root.WaterUptake");
			SoilWaterDeficit = (SWC - DUL);
			double OutFlowLat = MathUtilities.Sum(Soil.SoilWater.outflow_lat);
			AccumOutflowLat -= OutFlowLat;
			
			//Leaf number variable
			ExpandedLeafNoYesterday = (double)zone.Get("Maize.Leaf.ExpandedCohortNo");
			AppearedLeafNoYesterday = (double)zone.Get("Maize.Leaf.AppearedCohortNo");
		}
		
		[EventSubscribe("DoManagementCalculations")]
		private void OnDoManagementCalculations(object sender, EventArgs e)
		{
			FomN = MathUtilities.Sum(Soil.SoilNitrogen.FOMN);
			HumN = MathUtilities.Sum(Soil.SoilNitrogen.HumicN);
			BiomN = MathUtilities.Sum(Soil.SoilNitrogen.MicrobialN);
			
			
			AccumEO -= Soil.SoilWater.Eo;
			AccumES -= Soil.SoilWater.Es; 
			AccumDrainage -= Soil.SoilWater.Drainage;
			AccumRunoff -= Soil.SoilWater.Runoff;
			SWC = MathUtilities.Sum(Soil.SoilWater.SWmm);
			DUL = MathUtilities.Sum(Soil.SoilWater.DULmm);
			
			if ((double)zone.Get("Maize.Leaf.ExpandedCohortNo") > ExpandedLeafNoYesterday)
			{
				LeafExpandedPosition = (double)zone.Get("Maize.Leaf.ExpandedCohortNo");
				MostRecentlyExpandedLeafSize = (double)zone.Get("Maize.Leaf.CohortSize[" + (int)LeafExpandedPosition + "]");
			}
			//else
			//	LeafExpandedPosition = 0;
			
			if ((double)zone.Get("Maize.Leaf.AppearedCohortNo") > AppearedLeafNoYesterday)
			{
				LeafAppearedPosition = (double)zone.Get("Maize.Leaf.AppearedCohortNo");
				MostRecentlyAppearedLeafMaxSize = (double)zone.Get("Maize.Leaf.CohortParameters.MaxArea.Value");
			}
			//else
			//LeafAppearedPosition = 0;
			
		}
	}
}
```
            Manager Harvesting
```csharp
using System;
using Models.Core;
using System.Collections.Generic;
using System.Text;
using Models.Soils;
using Models.PMF;
using Models;
using System.Xml.Serialization;
using APSIM.Shared.Utilities;

namespace Models
{
	[Serializable] 
	public class Script : Model
	{
		[Link] Plant Maize;
		[Link] Zone zone;
					
        
		[EventSubscribe("Commencing")]
		private void OnSimulationCommencing(object sender, EventArgs e)
		{
		}
		
		[EventSubscribe("DoManagement")]
		private void OnDoManagement(object sender, EventArgs e)
		{
			if (Maize.Phenology.CurrentPhaseName == "ReadyForHarvesting")
			{
				Maize.Harvest();
				Maize.EndCrop();
			}
		}
		
		[EventSubscribe("DoManagementCalculations")]
		private void OnDoManagementCalculations(object sender, EventArgs e)
		{
			
		}
	}
}
```
            Report: EventNames=[Clock].DoReport
              VariableNames:
                [Clock].Today
                [ExtraVariables].Script.AccumPlantN
                [ExtraVariables].Script.AccumMineralisation
                [ExtraVariables].Script.AccumDenit
                [ExtraVariables].Script.AccumFert
                [ExtraVariables].Script.AccumLeach
                [ExtraVariables].Script.AccumDetach
                [ExtraVariables].Script.DeltaSoilOMN
                [ExtraVariables].Script.DeltaSurfaceOMN
                [ExtraVariables].Script.DeltaSoilMineralN
                [ExtraVariables].Script.SWC
                [ExtraVariables].Script.DUL
                [ExtraVariables].Script.OutFlowLat
                [ExtraVariables].Script.AccumEO
                [ExtraVariables].Script.AccumEP
                [ExtraVariables].Script.AccumES
                [ExtraVariables].Script.AccumDrainage
                [ExtraVariables].Script.AccumRunoff
                [ExtraVariables].Script.AccumRainfall
                [ExtraVariables].Script.AccumIrrigation
                [ExtraVariables].Script.AccumOutflowLat
                [ExtraVariables].Script.SoilWaterDeficit
                [ExtraVariables].Script.SoilNitrogenContent
                [ExtraVariables].Script.FomN
                [ExtraVariables].Script.HumN
                [ExtraVariables].Script.BiomN
                [ExtraVariables].Script.DltNMinRes
                [ExtraVariables].Script.DltNMinTot
                [Soil].SoilWater.SW
                [Soil].SoilWater.Eo
                [Soil].SoilWater.Es
                [Soil].SoilWater.Drainage
                [Soil].SoilWater.Runoff
                [Soil].SoilWater.pond
                sum([Soil].SoilWater.SWmm) as ProfileWater
                [Soil].NO3N
                [MicroClimate].net_radn
                [MicroClimate].peta
                [MicroClimate].petr
                [Maize].Grain.Live.Wt
                [Maize].Stem.Live.Wt
                [Maize].EarLive.Wt
                [Maize].Leaf.Live.Wt
                [Maize].Root.Live.Wt
                [Maize].Husk.Live.Wt
                [Maize].Rachis.Live.Wt
                [Maize].Tastle.Live.Wt
                [Maize].EarLive.N
                [Maize].Grain.Live.N
                [Maize].Stem.Live.N
                [Maize].Leaf.Live.N
                [Maize].Root.Live.N
                [Maize].Rachis.Live.N
                [Maize].Husk.Live.N
                [Maize].Root.WaterSupply
                [Maize].Root.WaterUptake
                [Maize].Leaf.Transpiration
                [Maize].Leaf.WaterDemand
                [Maize].Root.Depth
                [Maize].Leaf.CoverTotal
                [Maize].Leaf.CoverDead
                [Maize].Leaf.LAI
                [Maize].Leaf.Height
                [Maize].Leaf.CohortParameters.MaxArea.Value
                [Maize].Leaf.Fw
                [Maize].Leaf.Photosynthesis.FVPD.Value
                [Maize].Leaf.Photosynthesis.FT.Value
                [Maize].Leaf.Fn
                [Maize].Phenology.CurrentPhaseName
                [Maize].Phenology.Stage
                [Maize].AboveGroundLive.N
                [Maize].AboveGroundLive.Wt
                [Maize].Total.N
                [Maize].Total.Wt
                [Maize].Arbitrator.NDemand
                [Maize].Phenology.Stage
                [Maize].Leaf.ExpandedCohortNo
                [Maize].Leaf.AppearedCohortNo
                [Maize].Leaf.DeadCohortNo
                [Maize].Leaf.InitialisedCohortNo
                [Maize].Structure.MainStemFinalNodeNo
                [Maize].Structure.LeafTipsAppeared
                [Maize].Structure.MainStemPrimordiaNo
                [Maize].Leaf.CohortArea[1:30]
                [Maize].Leaf.CohortSLA[1:30]
                [Maize].Leaf.CohortParameters.SpecificLeafAreaMax.Value
                [Maize].Leaf.CohortParameters.SpecificLeafAreaMin.Value
                [Maize].Arbitrator.NDemand
                [Maize].Arbitrator.NSupply
                [Maize].Arbitrator.DMSupply
                [Maize].Arbitrator.DMDemand
                [Maize].Arbitrator.DMAllocated
                [Maize].Arbitrator.DMSinkLimitation
                [Maize].Arbitrator.DMNutrientLimitation
                [Maize].Leaf.CohortParameters.GrowthDuration.Value
                [Maize].Leaf.CohortParameters.LagDuration.Value
                [Maize].Leaf.CohortParameters.SenescenceDuration.Value
                [Maize].Structure.MainStemNodeAppearanceRate.Value
                [Maize].Structure.Height
                [Maize].Stem.DMDemandFunction.PotentialDMAccumulation.Value
                [Maize].Stem.DMDemandFunction.HightLimitedDMAccumulation.Value
                [Maize].Structure.MainStemPrimordiaNo
                [Maize].Grain.NumberFunction.Value
                [ExtraVariables].Script.LeafAppearedPosition
                [ExtraVariables].Script.MostRecentlyAppearedLeafMaxSize
                [ExtraVariables].Script.LeafExpandedPosition
                [ExtraVariables].Script.MostRecentlyExpandedLeafSize
                [Maize].Leaf.DeadCohortNo
                [Phenology].ThermalTime.Value
                [Maize].Leaf.SenescingCohortNo
                [Maize].Stem.MaximumNConc.Value
                [Maize].Stem.MinimumNConc.Value
                [Maize].Stem.Live.NConc
                [Maize].Leaf.Live.NConc
                [Maize].Grain.Live.NConc
                [Maize].Husk.Live.NConc
                [Maize].Rachis.Live.NConc
                [Maize].Leaf.Dead.NConc
                [Maize].Leaf.Photosynthesis.RueAct
                [Maize].Stem.Live.StructuralWt
                [Maize].Grain.GrowthRateGrainDevelopment.Value
            Report HarvestReport: EventNames=[Maize].Harvesting
              VariableNames:
                [Clock].Today
                [Maize].Phenology.CurrentStageName as Stage
                [Maize].Grain.Live.Wt as GrainWt
                [Maize].Stem.Live.Wt
                [Maize].EarLive.Wt
                [Maize].Leaf.Live.Wt
                [Maize].Root.Live.Wt
                [Maize].Husk.Live.Wt
                [Maize].Rachis.Live.Wt
                [Maize].EarLive.N
                [Maize].Grain.Live.N
                [Maize].Stem.Live.N
                [Maize].Leaf.Live.N
                [Maize].Root.Live.N
                [Maize].Root.Depth
                [Maize].AboveGround.N
                [Maize].AboveGround.Wt as Biomass
                [Maize].Total.N
                [Maize].Total.Wt
                max of [Maize].Leaf.LAI from [Maize].Sowing to [Maize].Harvesting as LAImax
                [Maize].Grain.NumberFunction.Value as GPSM
                [Maize].Grain.Size.Value as GrainSize
                [Maize].Population
    Folder Wheat
      Memo
        Testing of APSIM Maize under New Zealand conditions to determine the perormance of the model under temperate conditions with cool springs and mild summers.  A range of trials have been conducted and are detailed below
      Experiment Lincoln2015
        Memo: same as Validation.Maize.Lincoln2012.memo
        Factors: same as Validation.Maize.Lincoln2012.Factors
        Simulation Lincoln2015: Area=0; Slope=0
          Weather: FileName=lincoln.met
          Clock: StartDate=2015-09-07; EndDate=2015-02-15
          Summary summaryfile
          SoilArbitrator Soil Arbitrator
          Zone RainShelter: Area=1; Slope=0
            Soil paparoa_silt_loam: SoilType=lignin_FOM; Region=Generic soil types; State=Canterbury; Latitude=999999; Longitude=999999
              DataSource=Profile descriptions provided by Trevor Webb and data for functional horizions based on SWAMP project results
              Water
                Thickness  BD     AirDry  LL15  DUL   SAT
                200        1.311  0.06    0.06  0.3   0.37
                200        1.474  0.12    0.12  0.3   0.37
                200        1.601  0.1     0.12  0.26  0.32
                200        1.68   0.13    0.13  0.24  0.3
                200        1.68   0.12    0.12  0.24  0.3
                200        1.68   0.15    0.15  0.21  0.3
                200        1.68   0.15    0.15  0.21  0.3
                200        1.68   0.15    0.15  0.21  0.3
                SoilCrop WheatSoil: LL=[0.1, 0.12, 0.1, 0.08, 0.06, 0.08, 0.1, 0.1]; KL=[0.06, 0.06, 0.1, 0.1, 0.05, 0.03, 0.02, 0.01]; XF=[1, 1, 1, 1, 1, 1, 1, 1]
              SoilWater: same as Validation.Maize.Lincoln2012.Lincoln2012.RainShelter.paparoa_silt_loam.SoilWater
              SoilNitrogen: fom_type=[default, manure, mucuna, lablab, shemp, stable]; fract_carb=[0.2, 0.3, 0.54, 0.57, 0.45, 0]; fract_cell=[0.7, 0.3, 0.37, 0.37, 0.47, 0.1]; fract_lign=[0.1, 0.4, 0.09, 0.06, 0.08, 0.9]; wfpsN2N2O_x=[22, 88]; wfpsN2N2O_y=[0.1, 1]
              SoilOrganicMatter: same as Validation.Maize.Lincoln2012.Lincoln2012.RainShelter.paparoa_silt_loam.SoilOrganicMatter
              Analysis: Thickness=[200, 200, 200, 300, 300, 300]; PH=[6, 6, 6, 6, 6, 6]; PHUnits=Water; BoronUnits=HotWater
              Sample Initial nitrogen: same as Validation.Maize.Lincoln2012.Lincoln2012.RainShelter.paparoa_silt_loam.Initial nitrogen
            Plant Wheat: CropType=Wheat
            MicroClimate: same as Validation.Maize.Lincoln2012.Lincoln2012.RainShelter.MicroClimate
            Irrigation
            Fertiliser
            SurfaceOrganicMatter: same as Validation.Maize.Lincoln2012.Lincoln2012.RainShelter.SurfaceOrganicMatter
            Manager ClimateControl: same as Validation.Maize.Lincoln2012.Lincoln2012.RainShelter.ClimateControl
            Operations Irrig: same as Validation.Maize.Lincoln2012.Lincoln2012.RainShelter.Irrig
            Operations Fert
              2015-10-09  [Fertiliser].Apply(50, Fertiliser.Types.UreaN, 10);
              2015-10-29  [Fertiliser].Apply(100, Fertiliser.Types.UreaN, 10);
              2015-11-19  [Fertiliser].Apply(100, Fertiliser.Types.UreaN, 10);
            Operations Sow
              2015-09-10  [Wheat].Sow(population:165, cultivar:"Wakanui", depth:30, rowSpacing:130);
            Manager Harvesting
```csharp
using System;
using Models.Core;
using System.Collections.Generic;
using System.Text;
using Models.Soils;
using Models.PMF;
using Models;
using System.Xml.Serialization;
using APSIM.Shared.Utilities;

namespace Models
{
	[Serializable] 
	public class Script : Model
	{
		[Link] Plant Wheat;
		[Link] Zone zone;
					
        
		[EventSubscribe("Commencing")]
		private void OnSimulationCommencing(object sender, EventArgs e)
		{
		}
		
		[EventSubscribe("DoManagement")]
		private void OnDoManagement(object sender, EventArgs e)
		{
			if (Wheat.Phenology.CurrentPhaseName == "Ripening")
			{
				Wheat.Harvest();
				Wheat.EndCrop();
			}
		}
		[EventSubscribe("DoManagementCalculations")]
		private void OnDoManagementCalculations(object sender, EventArgs e)
		{
			
		}
	}
}
```
            Report: EventNames=[Clock].DoReport
              VariableNames:
                [Clock].Today
                [[Soil].SoilWater.SW
                [Soil].SoilWater.Eo
                [Soil].SoilWater.Es
                [Soil].SoilWater.Drainage
                [Soil].SoilWater.Runoff
                [Soil].SoilWater.pond
                sum([Soil].SoilWater.SWmm) as ProfileWater
                [Soil].NO3N
                [MicroClimate].net_radn
                [MicroClimate].peta
                [MicroClimate].petr
                [Wheat].Grain.Live.Wt
                [Wheat].Stem.Live.Wt
                [Wheat].EarLive.Wt
                [Wheat].Leaf.Live.Wt
                [Wheat].Root.Live.Wt
                [Wheat].Husk.Live.Wt
                [Wheat].Rachis.Live.Wt
                [Wheat].Tastle.Live.Wt
                [Wheat].EarLive.N
                [Wheat].Grain.Live.N
                [Wheat].Stem.Live.N
                [Wheat].Leaf.Live.N
                [Wheat].Root.Live.N
                [Wheat].Rachis.Live.N
                [Wheat].Husk.Live.N
                [Wheat].Root.WaterSupply
                [Wheat].Root.WaterUptake
                [Wheat].Leaf.Transpiration
                [Wheat].Leaf.WaterDemand
                [Wheat].Root.Depth
                [Wheat].Leaf.CoverTotal
                [Wheat].Leaf.CoverDead
                [Wheat].Leaf.LAI
                [Wheat].Leaf.Height
                [Wheat].Leaf.CohortParameters.MaxArea.Value
                [Wheat].Leaf.Fw
                [Wheat].Leaf.Photosynthesis.FVPD.Value
                [Wheat].Leaf.Photosynthesis.FT.Value
                [Wheat].Leaf.Fn
                [Wheat].Phenology.CurrentPhaseName
                [Wheat].Phenology.Stage
                [Wheat].AboveGroundLive.N
                [Wheat].AboveGroundLive.Wt
                [Wheat].Total.N
                [Wheat].Total.Wt
                [Wheat].Arbitrator.NDemand
                [Wheat].Phenology.Stage
                [Wheat].Leaf.ExpandedCohortNo
                [Wheat].Leaf.AppearedCohortNo
                [Wheat].Leaf.DeadCohortNo
                [Wheat].Leaf.InitialisedCohortNo
                [Wheat].Structure.MainStemFinalNodeNo
                [Wheat].Structure.LeafTipsAppeared
                [Wheat].Structure.MainStemPrimordiaNo
                [Wheat].Leaf.CohortArea[1:30]
                [Wheat].Leaf.CohortSLA[1:30]
                [Wheat].Leaf.CohortParameters.SpecificLeafAreaMax.Value
                [Wheat].Leaf.CohortParameters.SpecificLeafAreaMin.Value
                [Wheat].Arbitrator.NDemand
                [Wheat].Arbitrator.NSupply
                [Wheat].Arbitrator.DMSupply
                [Wheat].Arbitrator.DMDemand
                [Wheat].Arbitrator.DMAllocated
                [Wheat].Arbitrator.DMSinkLimitation
                [Wheat].Arbitrator.DMNutrientLimitation
                [Wheat].Leaf.CohortParameters.GrowthDuration.Value
                [Wheat].Leaf.CohortParameters.LagDuration.Value
                [Wheat].Leaf.CohortParameters.SenescenceDuration.Value
                [Wheat].Structure.MainStemNodeAppearanceRate.Value
                [Wheat].Structure.Height
                [Wheat].Stem.DMDemandFunction.PotentialDMAccumulation.Value
                [Wheat].Stem.DMDemandFunction.HightLimitedDMAccumulation.Value
                [Wheat].Structure.MainStemPrimordiaNo
                [Wheat].Grain.NumberFunction.Value
                [Wheat].Leaf.DeadCohortNo
                [Phenology].ThermalTime.Value
                [Wheat].Leaf.SenescingCohortNo
                [Wheat].Stem.MaximumNConc.Value
                [Wheat].Stem.MinimumNConc.Value
                [Wheat].Stem.Live.NConc
                [Wheat].Leaf.Live.NConc
                [Wheat].Grain.Live.NConc
                [Wheat].Husk.Live.NConc
                [Wheat].Rachis.Live.NConc
                [Wheat].Leaf.Dead.NConc
                [Wheat].Leaf.Photosynthesis.RueAct
                [Wheat].Stem.Live.StructuralWt
                [Wheat].Grain.GrowthRateGrainDevelopment.Value
            Report HarvestReport: EventNames=[Wheat].Harvesting
              VariableNames:
                [Clock].Today
                [Wheat].Phenology.CurrentStageName as Stage
                [Wheat].Grain.Live.Wt as GrainWt
                [Wheat].Stem.Live.Wt
                [Wheat].EarLive.Wt
                [Wheat].Leaf.Live.Wt
                [Wheat].Root.Live.Wt
                [Wheat].Husk.Live.Wt
                [Wheat].Rachis.Live.Wt
                [Wheat].EarLive.N
                [Wheat].Grain.Live.N
                [Wheat].Stem.Live.N
                [Wheat].Leaf.Live.N
                [Wheat].Root.Live.N
                [Wheat].Root.Depth
                [Wheat].AboveGround.N
                [Wheat].AboveGround.Wt as Biomass
                [Wheat].Total.N
                [Wheat].Total.Wt
                max of [Wheat].Leaf.LAI from [Wheat].Sowing to [Wheat].Harvesting as LAImax
                [Wheat].Grain.NumberFunction.Value as GPSM
                [Wheat].Grain.Size.Value as GrainSize
                [Wheat].Population
    Memo Combined Results
      ### Combined Results
      Simulation results for the combined datasets from the various countries are shown in the following graphs.  The model is able to adequately capture the influence of growing conditions (soil, climate) and management (population, Nitrogen, irrigation, sowing date).
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